n := 5
x := 2
y := ((sqrt(x^3 + n) + cos(|n*x - 1|)*sin((π/2)*n))/(nthroot(x^5 + 8*x + n, 4)*cos(π/4*(x + n))))^2 = 1.99445
t := -2, (-1.6) .. 2
f(x) := (x^2 - n*x + cos(x)*sqrt(|x - sin(n*x)|))
f(t) = [13.3362; 10.5372; 7.88074; 5.50929; 2.81732; 4.21469e-8; -1.18268; -2.49071; -4.11926; -5.46282; -6.66375]
A := READPRN("Matrix_A.txt")
A = [1, 2, 3; 4, 5, 6; 7, 8, 9]
B := [7, 8, 9, 10; 11, 12, 13, 14; 15, 16, 17, 18]
a := -2*n
b := 2*n
V := runif(3, a, b) = [-9.97463; -6.13354; 1.70012]
max(A) - min(A) = 8
ORIGIN := 1
sB := sum(sum(B[i, j], j = 1 .. cols(B)), i = 1 .. rows(B))/(rows(B)*cols(B)) = 12.5
sum(V[i]^2, i = 1 .. length(V)) = 140.004
W := [max(B[:, 1]); max(B[:, 2]); max(B[:, 3])] = [15; 16; 17]
WRITEPRN("W.txt") := W
# Задание №3
A := [n, n + 1, n + 2; n - 3, n - 2, n; n - 1, n, n + 1]
B := [6*n + 8; 6*n - 7; 6*n + 2]
[x; y; z] := A^-1*B
x = 1
y = 2
z = 3
X := [x; y; z]
X = [1; 2; 3]
# Задание №4
x1 := -3*π
x2 := 3*π
y(x) := e^(-(|x|/3))*cos(x)
x := x1, x1 + Δx .. x2  # error: Эта переменная не определена.
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# Задание №5
f1(x) := e^x*x^3
f2(x) := e^(-x)*x^3
Δx := 0.25
x1 := -9
x2 := 0
x := x1, x1 + Δx .. x2
t := x2, x2 + Δx .. 9
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# Задание №6
g(x) := sqrt(x)*sin(x)
x1 := 0
x2 := 20
Δx := 0.1
Nx := (x2 - x1)/Δx
Nx = 200
ORIGIN := 0
i := 0 .. Nx
x[i] := x1 + i*Δx
y[i] := g(x[i])
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# Задание №7
q(x) := e^(-x^2)
x1 := -3
x2 := 3
x := x1, x1 + Δx .. x2
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# Задание №8
x1 := -15
x2 := 15
f(x, y) := sin(sqrt(x^2 + y^2))/sqrt(x^2 + y^2)
y1 := -15
y2 := 15
# [component: inputs f]
